OpenVSP model (file version 5), 6 components.
Geometry view with OpenVSP parameter names; values to 6 digits, angles in degrees, lengths in the model's unit.
Overall bounding box: X_Min=-14.3599 X_Len=160.615 Y_Min=-42.7103 Y_Len=85.4205 Z_Min=-3.9929 Z_Len=16.7255

Fuselage "FuselageGeom"
  location (X Y Z) 0.275 0 0, rotation 0 0 0
  bounding box size 143.742 6.3 7.71793
  Design: Length=143.742
  cross sections:
    n  XLocPercent  YLocPercent  ZLocPercent  shape
    0  0            0            -0.0252      general fuselage BotStr=0.83 BotTanAngle=90 CornerRad=0 Height=0 LowStr=0.83 MaxWidthLoc=0 TopStr=0.83 TopTanAngle=90 UpStr=0.83 Width=0
    1  0.00601446   0            -0.0242504   general fuselage BotStr=0.83 BotTanAngle=90 CornerRad=0 Height=0.7 LowStr=0.83 MaxWidthLoc=0 TopStr=0.83 TopTanAngle=90 UpStr=0.83 Width=0.7
    2  0.429396     0            0            ellipse Ellipse_Height=5.40864 Ellipse_Width=6.3
    3  0.532268     0            0            ellipse Ellipse_Height=5.40864 Ellipse_Width=5.5
    4  0.672068     0            0            ellipse Ellipse_Height=5.40864 Ellipse_Width=6.3
    5  1            0            0.02127      circle Circle_Diameter=0.4375
    6  1            0            0.02127      point

Wing "Tail", child of "FuselageGeom"
  location (X Y Z) 120.771 0 2.80781, rotation 90 0 0
  bounding box size 21.4424 0.786784 1.28
  totals: TotalSpan=1.28 TotalProjectedSpan=1.28 TotalChord=19.3758 TotalArea=24.801 TotalAR=0.0660617
  root: chord 21.4424, twist 0, NACA 4-series Camber=0 CamberLoc=0.2 ThickChord=0.00916193
  sections:
    n  Span  Root_Chord  Tip_Chord  Area    Sweep  Sweep_Location  Dihedral  Twist  Twist_Location  tip airfoil
    1  1.28  21.4424     17.3093    24.801  67     0               0         0      0.25            biconvex ThickChord=0.0454545

Wing "All Moving Tail", child of "Tail"
  location (X Y Z) 123.793 0 4.09281, rotation 90 0 0
  bounding box size 22.4614 0.786458 8.63981
  totals: TotalSpan=8.63981 TotalProjectedSpan=8.63981 TotalChord=10.3826 TotalArea=89.704 TotalAR=0.83214
  root: chord 17.3021, twist 0, biconvex ThickChord=0.0454545
  sections:
    n  Span     Root_Chord  Tip_Chord  Area    Sweep    Sweep_Location  Dihedral  Twist  Twist_Location  tip airfoil
    1  8.63981  17.3021     3.46319    89.704  65.5455  0               0         0      0.25            biconvex ThickChord=0.1

Wing "WingGeom"
  location (X Y Z) 24.3638 0 -1.17391, rotation 0 0 0
  symmetric about XZ
  bounding box size 92.4984 85.4205 3.26684
  totals: TotalSpan=85.5095 TotalProjectedSpan=85.4203 TotalChord=59.0479 TotalArea=3475.98 TotalAR=2.09916
  root: chord 89.4869, twist 0, NACA 4-series Camber=0 CamberLoc=0.2 ThickChord=0.03
  sections:
    n  Span     Root_Chord  Tip_Chord  Area     Sweep    Sweep_Location  Dihedral   Twist      Twist_Location  tip airfoil
    1  1.73801  89.4869     85.3239    151.911  75       0               -0.967742  0          0.25            as above
    2  1.68313  85.3239     79.1999    138.458  75       0               -1.50538   0          0.25            NACA 4-series Camber=0 CamberLoc=0.414414 ThickChord=0.02
    3  4.46597  79.1999     67.0317    326.533  69.7273  0               -2         0          0.25            NACA 4-series Camber=0 CamberLoc=0.704545 ThickChord=0.015
    4  9.19895  67.0317     42.2661    502.712  69.7273  0               -2.5       0          0.25            NACA 4-series Camber=0 CamberLoc=0.2 ThickChord=0.015
    5  6.97989  42.2661     33.6048    264.785  52.3636  0               -2.5       0          0.25            as above
    6  18.6888  33.6048     4.23506    353.59   25       0.704545        -3         0.0909091  0.25            biconvex ThickChord=0

Pod "Quiet Spike"
  location (X Y Z) 6.42857 0 -3.5, rotation -180 1 -180
  bounding box size 20.7885 0.231134 0.471015
  Design: FineRatio=179.91 Length=20.7917

Pod "Quiet Spike nose joint", child of "Quiet Spike"
  location (X Y Z) -2.38095 0 -3.66, rotation 0 -2 0
  bounding box size 10.1605 0.471498 0.654576
  Design: FineRatio=43.125 Length=10.1667

VSPAERO settings: Sref=36.735 bref=9.3 cref=3.95 Xcg=44.249 Ycg=0 Zcg=0 AlphaStart=0 AlphaEnd=10 AlphaNpts=6 BetaStart=0 BetaEnd=0 BetaNpts=1 MachStart=0.8 MachEnd=0 MachNpts=1 ReCref=1e+07 Vinf=100 Rho=0.002377
  control group "canard_SS_CONT_0": DeflectionAngle=0
