OpenVSP model (file version 5), 5 components.
Geometry view with OpenVSP parameter names; values to 6 digits, angles in degrees, lengths in the model's unit.
Overall bounding box: X_Min=0 X_Len=35 Y_Min=-12.2106 Y_Len=24.4211 Z_Min=-1.5 Z_Len=5.93121

Fuselage "Fuselage"
  location (X Y Z) 0 0 0, rotation 0 0 0
  bounding box size 35 5.90007 3
  Design: Length=35
  cross sections:
    n  XLocPercent  YLocPercent  YRotate   ZLocPercent  shape
    0  0            0            0         -0.0182915   point
    1  0.115294     0            0         -0.0163934   ellipse Ellipse_Height=1.8067 Ellipse_Width=1.9898
    2  0.234431     0            0         0            super ellipse Super_Height=3 Super_M=2 Super_MaxWidthLoc=-0.4 Super_N=2 Super_Width=2.5
    3  0.394286     0            0         -0.008       super ellipse Super_Height=2.3 Super_M=1.51764 Super_MaxWidthLoc=-0.37 Super_N=0.875367 Super_Width=5.9
    4  0.6          0            0         -0.008       as above
    5  0.809581     0            0         -0.008       super ellipse Super_Height=2.3 Super_M=2 Super_MaxWidthLoc=0 Super_N=2 Super_Width=2
    6  1            0            -10.2857  0.0138957    point

Wing "MainWing"
  location (X Y Z) 13.8 0 -0.7055, rotation 0 0 0
  symmetric about XZ
  bounding box size 15.2274 24.4211 0.72
  totals: TotalSpan=24.3 TotalProjectedSpan=24.3 TotalChord=5.87281 TotalArea=126.12 TotalAR=4.68199
  root: chord 7.2, twist 0, wedge DuLow=0.1 DuUp=0.1 FlatLow=0 FlatUp=0 SymmThick=1 ThickChord=0.1 ThickLoc=0.5 ThickLocLow=0.5 UForeLow=0.25 UForeUp=0.75 ZCamber=0
  sections:
    n  Span  Root_Chord  Tip_Chord  Area     Sweep  Sweep_Location  Dihedral  Twist  Twist_Location  tip airfoil
    1  2.95  7.2         7.2        21.24    0      0               0         0      0.25            as above
    2  9.2   7.2         1.89125    41.8198  55.4   0               0         0      0.25            as above

Wing "HStab", child of "MainWing"
  location (X Y Z) 28.6358 0 1.5508, rotation 0 0 0
  symmetric about XZ
  bounding box size 4.80448 5.42383 0.240039
  totals: TotalSpan=5.38095 TotalProjectedSpan=5.38095 TotalChord=2.93702 TotalArea=15.804 TotalAR=1.83211
  root: chord 4.8, twist 0, wedge DuLow=0.1 DuUp=0.1 FlatLow=0 FlatUp=0 SymmThick=1 ThickChord=0.05 ThickLoc=0.5 ThickLocLow=0.5 UForeLow=0.25 UForeUp=0.75 ZCamber=0
  sections:
    n  Span     Root_Chord  Tip_Chord  Area     Sweep  Sweep_Location  Dihedral  Twist  Twist_Location  tip airfoil
    1  2.69048  4.8         1.07404    7.90199  54.2   0               0         0      0.25            as above

Wing "VStab", child of "HStab"
  location (X Y Z) 23.5246 0 0.57377, rotation 90 0 0
  bounding box size 10.7404 1.11139 4.06676
  totals: TotalSpan=3.76833 TotalProjectedSpan=3.76833 TotalChord=5.60273 TotalArea=17.3912 TotalAR=0.816523
  root: chord 10.5082, twist 0, wedge DuLow=0.1 DuUp=0.1 FlatLow=0 FlatUp=0 SymmThick=1 ThickChord=0.1 ThickLoc=0.5 ThickLocLow=0.5 UForeLow=0.25 UForeUp=0.75 ZCamber=0
  sections:
    n  Span      Root_Chord  Tip_Chord  Area     Sweep    Sweep_Location  Dihedral  Twist  Twist_Location  tip airfoil
    1  0.977046  10.5082     4.8        7.47842  79.1781  0               0         0      0.25            as above
    2  2.79129   4.8         2.30268    9.91282  50       0               0         0      0.25            as above

Mesh "MeshGeom"
  location (X Y Z) 0 0 0, rotation 0 0 0
  triangle mesh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
