OpenVSP model (file version 5), 3 components.
Geometry view with OpenVSP parameter names; values to 6 digits, angles in degrees, lengths in the model's unit.
Overall bounding box: X_Min=0 X_Len=10.5146 Y_Min=0 Y_Len=4.04073 Z_Min=-0.250041 Z_Len=0.737547

Wing "WingGeom"
  location (X Y Z) 0 0 0, rotation 0 0 0
  bounding box size 10.5146 4.04073 0.500081
  totals: TotalSpan=4 TotalProjectedSpan=4 TotalChord=4.25 TotalArea=12.5 TotalAR=1.28
  root: chord 10, twist 0, wedge DuLow=0.1 DuUp=0.1 FlatLow=0 FlatUp=0 SymmThick=1 ThickChord=0.05 ThickLoc=0.7 ThickLocLow=0.7 UForeLow=0.25 UForeUp=0.75 ZCamber=0
  sections:
    n  Span  Root_Chord  Tip_Chord  Area  Sweep  Sweep_Location  Dihedral  Twist  Twist_Location  tip airfoil
    1  1     10          3          6.5   -30    1               0         0      0.25            wedge DuLow=0.1 DuUp=0.1 FlatLow=0 FlatUp=0 SymmThick=1 ThickChord=0.05 ThickLoc=0.5 ThickLocLow=0.5 UForeLow=0.25 UForeUp=0.75 ZCamber=0
    2  3     3           1          6     20     1               0         0      0.25            wedge DuLow=0.1 DuUp=0.1 FlatLow=0 FlatUp=0 SymmThick=1 ThickChord=0.1 ThickLoc=0.5 ThickLocLow=0.5 UForeLow=0.25 UForeUp=0.75 ZCamber=0

BodyOfRevolution "BORGeom", child of "WingGeom"
  location (X Y Z) 8.5 0.5 0.3, rotation 0 0 0
  bounding box size 1.5 0.375012 0.375012
  Design: A0=0.0706858 Ae=0.0706858 Amin=0.0397599 AminW=0.249983 Angle=0 Diameter=0.3 Mode=0
  profile: wedge Chord=1.5 DuLow=0.1 DuUp=0.1 FlatLow=0 FlatUp=0 SymmThick=1 ThickChord=0.05 ThickLoc=0.25 ThickLocLow=0.25 UForeLow=0.25 UForeUp=0.75 ZCamber=0

Mesh "MeshGeom"
  location (X Y Z) 0 0 0, rotation 0 0 0
  triangle mesh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
