OpenVSP model (file version 5), 2 components.
Geometry view with OpenVSP parameter names; values to 6 digits, angles in degrees, lengths in the model's unit.
Overall bounding box: X_Min=0 X_Len=5.5082 Y_Min=-1 Y_Len=2 Z_Min=-0.0250041 Z_Len=0.29591

Wing "WingGeom"
  location (X Y Z) 0 0 0, rotation 0 0 0
  symmetric about XZ
  bounding box size 1 2 0.0500081
  totals: TotalSpan=2 TotalProjectedSpan=2 TotalChord=0.5 TotalArea=1 TotalAR=4
  root: chord 1, twist 0, wedge DuLow=0.1 DuUp=0.1 FlatLow=0 FlatUp=0 SymmThick=1 ThickChord=0.05 ThickLoc=0.25 ThickLocLow=0.25 UForeLow=0.25 UForeUp=0.75 ZCamber=0
  sections:
    n  Span  Root_Chord  Tip_Chord  Area  Sweep  Sweep_Location  Dihedral  Twist  Twist_Location  tip airfoil
    1  1     1           0          0.5   0      1               0         0      0.25            wedge DuLow=0.1 DuUp=0.1 FlatLow=0 FlatUp=0 SymmThick=1 ThickChord=0.1 ThickLoc=0.5 ThickLocLow=0.5 UForeLow=0.25 UForeUp=0.75 ZCamber=0

Wing "WingGeom", child of "WingGeom"
  location (X Y Z) 4.5082 0 0.245902, rotation 0 0 0
  symmetric about XZ
  bounding box size 1 2 0.0500081
  totals: TotalSpan=2 TotalProjectedSpan=2 TotalChord=0.5 TotalArea=1 TotalAR=4
  root: chord 1, twist 0, wedge DuLow=0.1 DuUp=0.1 FlatLow=0 FlatUp=0 SymmThick=1 ThickChord=0.05 ThickLoc=0.25 ThickLocLow=0.25 UForeLow=0.25 UForeUp=0.75 ZCamber=0
  sections:
    n  Span  Root_Chord  Tip_Chord  Area  Sweep  Sweep_Location  Dihedral  Twist  Twist_Location  tip airfoil
    1  1     1           0          0.5   0      1               0         0      0.25            wedge DuLow=0.1 DuUp=0.1 FlatLow=0 FlatUp=0 SymmThick=1 ThickChord=0.1 ThickLoc=0.5 ThickLocLow=0.5 UForeLow=0.25 UForeUp=0.75 ZCamber=0
