OpenVSP model (file version 5), 4 components.
Geometry view with OpenVSP parameter names; values to 6 digits, angles in degrees, lengths in the model's unit.
Overall bounding box: X_Min=-0.75 X_Len=3.25 Y_Min=-1 Y_Len=2 Z_Min=-0.1 Z_Len=0.2

Wing "WingGeom"
  location (X Y Z) 0 0 0, rotation 0 1 0
  symmetric about XZ
  bounding box size 0.999848 2 0.0699893
  totals: TotalSpan=2 TotalProjectedSpan=2 TotalChord=0.5 TotalArea=1 TotalAR=4
  root: chord 1, twist 0, wedge DuLow=0.1 DuUp=0.1 FlatLow=0 FlatUp=0 SymmThick=1 ThickChord=0.07 ThickLoc=0.25 ThickLocLow=0.25 UForeLow=0.25 UForeUp=0.75 ZCamber=0
  sections:
    n  Span  Root_Chord  Tip_Chord  Area  Sweep  Sweep_Location  Dihedral  Twist  Twist_Location  tip airfoil
    1  1     1           0          0.5   0      1               0         0      0.25            NACA 4-series Camber=0 CamberLoc=0.2 ThickChord=0.1

Wing "WingGeom", child of "WingGeom"
  location (X Y Z) 1.63934 0 0.045, rotation 0 0 0
  symmetric about XZ
  bounding box size 0.5 0.965926 0.141912
  totals: TotalSpan=1 TotalProjectedSpan=0.965926 TotalChord=0.25 TotalArea=0.25 TotalAR=3.73205
  root: chord 0.5, twist 0, wedge DuLow=0.1 DuUp=0.1 FlatLow=0 FlatUp=0 SymmThick=1 ThickChord=0.05 ThickLoc=0.25 ThickLocLow=0.25 UForeLow=0.25 UForeUp=0.75 ZCamber=0
  sections:
    n  Span  Root_Chord  Tip_Chord  Area   Sweep  Sweep_Location  Dihedral  Twist  Twist_Location  tip airfoil
    1  0.5   0.5         0          0.125  0      1               -15       0      0.25            NACA 4-series Camber=0 CamberLoc=0.2 ThickChord=0.1

Fuselage "FuselageGeom"
  location (X Y Z) -0.75 0 0, rotation 0 0 0
  bounding box size 3.25 0.258356 0.2
  Design: Length=3.25
  cross sections:
    n  XLocPercent  YLocPercent  ZLocPercent  shape
    0  0            0            -0.015       point
    1  0.230769     0            0            rounded rectangle RoundRectXSec_Radius=0.075 RoundRect_Keystone=0.4 RoundedRect_Height=0.2 RoundedRect_Width=0.25
    2  0.538462     0            0            as above
    3  0.625        0            0            rounded rectangle RoundRectXSec_Radius=0.075 RoundRect_Keystone=0.4 RoundedRect_Height=0.18 RoundedRect_Width=0.25
    4  0.75         0            0            rounded rectangle RoundRectXSec_Radius=0.075 RoundRect_Keystone=0.4 RoundedRect_Height=0.15 RoundedRect_Width=0.2
    5  1            0            0            point

Mesh "MeshGeom"
  location (X Y Z) 0 0 0, rotation 0 0 0
  triangle mesh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
