OpenVSP model (file version 5), 1 components.
Geometry view with OpenVSP parameter names; values to 6 digits, angles in degrees, lengths in the model's unit.
Overall bounding box: X_Min=0 X_Len=30 Y_Min=-8.03848 Y_Len=16.077 Z_Min=0 Z_Len=1.20039

Wing "WingGeom"
  location (X Y Z) 0 0 0, rotation 0 0 0
  symmetric about XZ
  bounding box size 30 16.077 1.20039
  totals: TotalSpan=16.077 TotalProjectedSpan=16.077 TotalChord=15 TotalArea=241.154 TotalAR=1.0718
  root: chord 30, twist 0, edit curve Width=30 Height=1.2 AbsoluteFlag=0 SymType=1 linear points (X Y): 0.5 0, 0.25 0, 0 0, -0.25 0, -0.5 0, -0.0428 1, 0 1, 0.0428 1, 0.5 0
  sections:
    n  Span     Root_Chord  Tip_Chord  Area     Sweep  Sweep_Location  Dihedral  Twist  Twist_Location  tip airfoil
    1  8.03848  30          0          120.577  75     0               0         0      0.25            edit curve Width=0 Height=0.1 AbsoluteFlag=0 SymType=1 linear points (X Y): 0.5 0, 0.25 0, 0 0, -0.25 0, -0.5 0, -0.25 0, 0 0, 0.25 0, 0.5 0

VSPAERO settings: Sref=241.15 bref=16.077 cref=20.025 Xcg=0 Ycg=0 Zcg=0 AlphaStart=0 AlphaEnd=25 AlphaNpts=6 BetaStart=0 BetaEnd=0 BetaNpts=1 MachStart=0 MachEnd=0 MachNpts=1 ReCref=1e+07 Vinf=100 Rho=0.002377
