OpenVSP model (file version 5), 3 components.
Geometry view with OpenVSP parameter names; values to 6 digits, angles in degrees, lengths in the model's unit.
Overall bounding box: X_Min=0 X_Len=85 Y_Min=-1 Y_Len=2 Z_Min=-1 Z_Len=2

Ellipsoid "EllipsoidGeom"
  location (X Y Z) 0 0 0, rotation 0 0 0
  bounding box size 2 2 2
  Design: A_Radius=1 B_Radius=1 C_Radius=1

BodyOfRevolution "BORGeom"
  location (X Y Z) 21 0 0, rotation 0 0 0
  bounding box size 80 2 2
  Design: A0=3.14159 Ae=3.14159 Amin=3.14159 AminW=0.332676 Angle=0 Diameter=2 Mode=0
  profile: edit curve Width=40 Height=0 AbsoluteFlag=0 SymType=1 linear points (X Y): 1 1, 0.5 -0.5, 0 -0.5, -0.5 -0.5, -1 1, -0.5 0.5, 0 0.5, 0.5 0.5, 1 1

Cone "Cone", child of "BORGeom"
  location (X Y Z) 81 0 0, rotation 0 0 0
  bounding box size 4 2 2
  Design: Diameter=2 Height=4
  custom script Cone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
